// SBML level 1 version 2

model model()

  // Compartments:
  compartment V1 = 1e-21;

  // Species:
  species $A in V1 = 3.333333e-23/V1;
  species AAA in V1 = 3.333333e-23/V1;
  species AAAA in V1 = 3.333333e-23/V1;
  species AAAAABB in V1 = 0;
  species AAAAB in V1 = 0;
  species AAAB in V1 = 3.333333e-23/V1;
  species AAB in V1 = 3.333333e-23/V1;
  species AABA in V1 = 3.333333e-23/V1;
  species AABAABB in V1 = 0;
  species AABABABB in V1 = 0;
  species AABB in V1 = 3.333333e-23/V1;
  species $AB in V1 = 3.333333e-23/V1;
  species ABA in V1 = 3.333333e-23/V1;
  species ABAA in V1 = 3.333333e-23/V1;
  species ABAAAA in V1 = 0;
  species ABAABAAA in V1 = 0;
  species ABB in V1 = 3.333333e-23/V1;
  species ABBAB in V1 = 0;
  species ABBB in V1 = 3.333333e-23/V1;
  species $B in V1 = 3.333333e-23/V1;
  species BAA in V1 = 3.333333e-23/V1;
  species BAAA in V1 = 3.333333e-23/V1;
  species BAB in V1 = 3.333333e-23/V1;
  species BABA in V1 = 3.333333e-23/V1;
  species BABAAAA in V1 = 0;
  species BABAAABB in V1 = 0;
  species BABB in V1 = 3.333333e-23/V1;
  species BABBAABA in V1 = 0;
  species $BB in V1 = 3.333333e-23/V1;
  species BBA in V1 = 3.333333e-23/V1;
  species BBAA in V1 = 3.333333e-23/V1;
  species BBAAABAA in V1 = 0;
  species BBAABAA in V1 = 0;
  species BBAABAB in V1 = 0;
  species BBAB in V1 = 3.333333e-23/V1;
  species BBB in V1 = 3.333333e-23/V1;
  species BBBA in V1 = 3.333333e-23/V1;
  species BBBB in V1 = 3.333333e-23/V1;
  species BBBBABA in V1 = 0;

  // Reactions:
  cleavage1: AAB + BAA => AAB; cleavage1___RATE__*(AAB * V1)*(BAA * V1);
    cleavage1___RATE__ = 2.5e22;
  cleavage10: ABA + AAA => ABA; cleavage10___RATE__*(ABA * V1)*(AAA * V1);
    cleavage10___RATE__ = 2.5e22;
  cleavage12: ABBAB + ABAA => ABA + ABBAB; cleavage12___RATE__*(ABBAB * V1)*(ABAA * V1);
    cleavage12___RATE__ = 2.5e22;
  cleavage13: BBA + ABBB => ABBB; cleavage13___RATE__*(BBA * V1)*(ABBB * V1);
    cleavage13___RATE__ = 2.5e22;
  cleavage14: BBAA + BABB => BAA + BABB; cleavage14___RATE__*(BBAA * V1)*(BABB * V1);
    cleavage14___RATE__ = 2.5e22;
  cleavage15: AAAB + ABBB => AAAB + BBB; cleavage15___RATE__*(AAAB * V1)*(ABBB * V1);
    cleavage15___RATE__ = 2.5e22;
  cleavage16: ABB + BBAA => BBAA; cleavage16___RATE__*(ABB * V1)*(BBAA * V1);
    cleavage16___RATE__ = 2.5e22;
  cleavage18: AABB + BAAA => ABB + BAAA; cleavage18___RATE__*(AABB * V1)*(BAAA * V1);
    cleavage18___RATE__ = 2.5e22;
  cleavage2: BBBA + AAB => BBBA; cleavage2___RATE__*(BBBA * V1)*(AAB * V1);
    cleavage2___RATE__ = 2.5e22;
  cleavage20: 2 BBBB => BBB + BBBB; cleavage20___RATE__*(BBBB * V1)^2;
    cleavage20___RATE__ = 2.5e22;
  cleavage21: BBBB + ABAA => BBBB + BAA; cleavage21___RATE__*(BBBB * V1)*(ABAA * V1);
    cleavage21___RATE__ = 2.5e22;
  cleavage23: BABB + ABBB => ABBB; cleavage23___RATE__*(BABB * V1)*(ABBB * V1);
    cleavage23___RATE__ = 2.5e22;
  cleavage25: BBBA + BABA => BBA + BABA; cleavage25___RATE__*(BBBA * V1)*(BABA * V1);
    cleavage25___RATE__ = 2.5e22;
  cleavage26: BBAB + AAAAABB => BBA + AAAAABB; cleavage26___RATE__*(BBAB * V1)*(AAAAABB * V1);
    cleavage26___RATE__ = 2.5e22;
  cleavage27: AAAAABB + AABA => ABA + AAAAABB; cleavage27___RATE__*(AAAAABB * V1)*(AABA * V1);
    cleavage27___RATE__ = 2.5e22;
  cleavage3: BAA + BABA => BAA + BAB; cleavage3___RATE__*(BAA * V1)*(BABA * V1);
    cleavage3___RATE__ = 2.5e22;
  cleavage4: $AB + BAAA => BAAA; cleavage4___RATE__*(AB * V1)*(BAAA * V1);
    cleavage4___RATE__ = 2.5e22;
  cleavage5: AABB + BAB => AABB; cleavage5___RATE__*(AABB * V1)*(BAB * V1);
    cleavage5___RATE__ = 2.5e22;
  cleavage6: BBAA + BABB => ABB + BBAA; cleavage6___RATE__*(BBAA * V1)*(BABB * V1);
    cleavage6___RATE__ = 2.5e22;
  cleavage8: BBA + BBAB => BBA; cleavage8___RATE__*(BBA * V1)*(BBAB * V1);
    cleavage8___RATE__ = 2.5e22;
  complexation0: AAAA + $B => AAAAB; complexation0___RATE__*(AAAA * V1)*(B * V1);
    complexation0___RATE__ = 5e22;
  complexation11: BBB + BABA => BBBBABA; complexation11___RATE__*(BBB * V1)*(BABA * V1);
    complexation11___RATE__ = 5e22;
  complexation17: BBAA + BAA => BBAABAA; complexation17___RATE__*(BBAA * V1)*(BAA * V1);
    complexation17___RATE__ = 5e22;
  complexation19: ABA + AAA => ABAAAA; complexation19___RATE__*(ABA * V1)*(AAA * V1);
    complexation19___RATE__ = 5e22;
  complexation22: BBAA + ABAA => BBAAABAA; complexation22___RATE__*(BBAA * V1)*(ABAA * V1);
    complexation22___RATE__ = 5e22;
  complexation24: BABB + AABA => AABABABB; complexation24___RATE__*(BABB * V1)*(AABA * V1);
    complexation24___RATE__ = 5e22;
  complexation7: ABB + AABA => AABAABB; complexation7___RATE__*(ABB * V1)*(AABA * V1);
    complexation7___RATE__ = 5e22;
  complexation9: BBAA + BAB => BBAABAB; complexation9___RATE__*(BBAA * V1)*(BAB * V1);
    complexation9___RATE__ = 5e22;
  condensation0: $BB + AAAAB => AAAA + BBB; condensation0___RATE__*(BB * V1)*(AAAAB * V1);
    condensation0___RATE__ = 5e22;
  condensation11: AABB + BBBBABA => BABAAABB + BBB; condensation11___RATE__*(AABB * V1)*(BBBBABA * V1);
    condensation11___RATE__ = 5e22;
  condensation17: BBAABAA + $A => BBAA + BAAA; condensation17___RATE__*(BBAABAA * V1)*(A * V1);
    condensation17___RATE__ = 5e22;
  condensation19: ABAAAA + AABB => ABA + AAAAABB; condensation19___RATE__*(ABAAAA * V1)*(AABB * V1);
    condensation19___RATE__ = 5e22;
  condensation22: BBAAABAA + BAAA => ABAABAAA + BBAA; condensation22___RATE__*(BBAAABAA * V1)*(BAAA * V1);
    condensation22___RATE__ = 5e22;
  condensation24: AABABABB + AABA => BABBAABA + AABA; condensation24___RATE__*(AABABABB * V1)*(AABA * V1);
    condensation24___RATE__ = 5e22;
  condensation7: $AB + AABAABB => ABBAB + AABA; condensation7___RATE__*(AB * V1)*(AABAABB * V1);
    condensation7___RATE__ = 5e22;
  condensation9: AAAA + BBAABAB => BABAAAA + BBAA; condensation9___RATE__*(AAAA * V1)*(BBAABAB * V1);
    condensation9___RATE__ = 5e22;
  decomplexation0: AAAAB => AAAA; decomplexation0___RATE__*(AAAAB * V1);
    decomplexation0___RATE__ = 1e15;
  decomplexation11: BBBBABA => BBB + BABA; decomplexation11___RATE__*(BBBBABA * V1);
    decomplexation11___RATE__ = 1e15;
  decomplexation17: BBAABAA => BBAA + BAA; decomplexation17___RATE__*(BBAABAA * V1);
    decomplexation17___RATE__ = 1e15;
  decomplexation19: ABAAAA => ABA + AAA; decomplexation19___RATE__*(ABAAAA * V1);
    decomplexation19___RATE__ = 1e15;
  decomplexation22: BBAAABAA => BBAA + ABAA; decomplexation22___RATE__*(BBAAABAA * V1);
    decomplexation22___RATE__ = 1e15;
  decomplexation24: AABABABB => BABB + AABA; decomplexation24___RATE__*(AABABABB * V1);
    decomplexation24___RATE__ = 1e15;
  decomplexation7: AABAABB => ABB + AABA; decomplexation7___RATE__*(AABAABB * V1);
    decomplexation7___RATE__ = 1e15;
  decomplexation9: BBAABAB => BBAA + BAB; decomplexation9___RATE__*(BBAABAB * V1);
    decomplexation9___RATE__ = 1e15;

  // Unit definitions:
  unit volume = dimensionless;
  unit substance = item;
end
